Given
π_1 := 0.5
π_2 := 0.5
λ := 0.5
P_2000 == 0
P_1000 == 0
P_2100 == P_1000 + P_1100*π_1 + P_1001*(1 - π_2) + P_1101*π_1*(1 - π_2)
P_1100 == P_2100*π_1 + P_2101*π_1*(1 - π_2)
P_2101 == P_1100*(1 - □*π_1) + P_1011*(1 - π_2) + P_1101*((1 - π_1)*(1 - π_2) + π_1*π_2) + P_1111*π_1*(1 - π_2)
P_1001 == P_2100*(1 - π_1) + P_2101*(1 - π_1)*(1 - π_2)
P_1011 == P_2101*(1 - π_1)*π_2 + P_2111*((1 - π_1)*(1 - π_2) + (1 - π_1)*π_2)
P_2111 == P_1011*π_2 + P_1101*(1 - π_1)*π_2 + P_1111*((1 - π_1)*π_2 + (1 - π_1)*(1 - π_2) + π_1*π_2)
P_1101 == P_2111*π_1*(1 - π_2) + P_2101*π_1*π_2
P_1111 == P_2111*π_1*π_2
P_2000 + P_1000 + P_2100 + P_1100 + P_2101 + P_1001 + P_1011 + P_2111 + P_1101 + P_1111 == 1
[P_2000; P_1000; P_2100; P_1100; P_2101; P_1001; P_1011; P_2111; P_1101; P_1111] := Find(P_2000, P_1000, P_2100, P_1100, P_2101, P_1001, P_1011, P_2111, P_1101, P_1111) → [0; 0; 0.164122137405; 0.143129770992; 0.24427480916; 0.143129770992; 0.106870229008; 0.0916030534351; 0.0839694656489; 0.0229007633588]
A := (1 - π_2)*(P_2101 + P_1001 + P_1011 + P_2111 + P_1101 + P_1111) = 0.346374
P_отк := 1 - A/λ = 0.307252
L_оч := P_1011 + P_2111 + P_1111 = 0.221374
W_оч := L_оч/A = 0.639118
